#------------------------------------------------------------------------
units metal
dimension 3
boundary p p p
atom_style atomic
#------------------------------------------------------------------------
# 2NN-MEAM
pair_style meam
pair_coeff * * library.meam Ag Cu Sn AgCuSn.meam Ag Cu Sn
#------------------------------------------------------------------------
