#------------------------------------------------------------------------
units metal
dimension 3
boundary p p p
atom_style atomic
#------------------------------------------------------------------------
# 1NN-MEAM
pair_style meam
pair_coeff * * library.meam Rh Pt RhPt.meam Rh Pt
#------------------------------------------------------------------------
