#-----------------------------------------------------------
# Usage
pair_style polymorphic
pair_coeff * * jcc_26176_fech_bop_i.txt Fe C H
#-----------------------------------------------------------
# Usage
pair_style polymorphic
pair_coeff * * jcc_26176_fech_bop_ii.txt Fe C H
#-----------------------------------------------------------
# Usage
pair_style polymorphic
pair_coeff * * FeCH_BOP_I.poly Fe C H
#-----------------------------------------------------------
# Usage
pair_style polymorphic
pair_coeff * * FeCH_BOP_II.poly Fe C H
#-----------------------------------------------------------
# Not ! (This settings do not work !)
pair_style polymorphic
pair_coeff * * jcc_26176_fech_bop_i.txt Fe H
#-----------------------------------------------------------
